*Heading
ABAQUS input file for SBFEM UEL
*NODE, NSET=SBFEM_NODE
      1,           1., -0.200000003, 0.0250000004
      2,           1.,  0.200000003, 0.0250000004
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*USER ELEMENT, NODES=8, TYPE=U1008, I PROPERTIES=3, PROPERTIES=8, COORDINATES=3, VARIABLES=1200
1, 2, 3
*ELEMENT, TYPE=U1008, ELSET=SBFEM_UEL
  1,  174, 1009, 1594,   97,    1,   37,   66,    4
  2, 1009, 1010, 1595, 1594,   37,   38,   65,   66
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*UEL PROPERTY, ELSET=SBFEM_UEL
1000000.000000,	0.250000,	2000.000000,	0, 0, 0, 0, 0
1,	5120, 1
*Nset, nset=Fixed
   5,   6,   7,   8,   9,  10
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*Nset, nset=corner
23, 30
*Nset, nset=internal
2,  3, 11, 17, 18, 22, 35
*Nset, nset=monitor
19,
*BOUNDARY
Fixed, 1, 3
*Amplitude, name=Amp-1, definition=PERIODIC
1, 6.28318530717959,              0.,              0.
             0.,              1.
*Step, name=Step-1, nlgeom=NO, inc=500
*Dynamic
0.01,2.5,2.5e-05,0.01
*Cload, amplitude=Amp-1
corner, 2, -25.
*Cload, amplitude=Amp-1
internal, 2, -50.
*Output, field
*Node Output
U,
*Output, history, frequency=1
*Node Output, nset=monitor
A2, U2, V2
*End Step
