  *Heading
ABAQUS input file for SBFEM UEL
*NODE, NSET=SBFEM_NODE
1,	3.0000000000,	3.0000000000,	0.0000000000
2,	3.0000000000,	0.0000000000,	0.7500000000
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*USER ELEMENT, NODES=8, TYPE=U1008, I PROPERTIES=3, PROPERTIES=8, COORDINATES=3, VARIABLES=1200
1, 2, 3
*ELEMENT, TYPE=U1008, ELSET=Upper
5,	41,	51,	52,	56,	60,	61,	64,	65
7,	35,	45,	46,	57,	62,	63,	66,	67
11,	43,	54,	55,	58,	68,	69,	72,	73
13,	37,	49,	50,	59,	70,	71,	74,	75
*USER ELEMENT, NODES=10, TYPE=U1010, I PROPERTIES=3, PROPERTIES=8, COORDINATES=3, VARIABLES=1860
1, 2, 3
*ELEMENT, TYPE=U1010, ELSET=Upper
6,	38,	44,	45,	52,	56,	57,	61,	62,	65,	66
8,	42,	51,	53,	54,	56,	58,	64,	65,	68,	69
10,	36,	46,	47,	49,	57,	59,	66,	67,	70,	71
12,	40,	48,	50,	55,	58,	59,	69,	70,	73,	74
*USER ELEMENT, NODES=13, TYPE=U1013, I PROPERTIES=3, PROPERTIES=8, COORDINATES=3, VARIABLES=3120
1, 2, 3
*ELEMENT, TYPE=U1013, ELSET=Lower
1,	1,	2,	4,	5,	10,	11,	12,	13,	23,	26,	27,	29,	30
2,	2,	3,	5,	6,	13,	14,	15,	16,	25,	27,	28,	30,	31
3,	4,	5,	7,	8,	10,	17,	18,	19,	22,	29,	30,	32,	33
4,	5,	6,	8,	9,	14,	19,	20,	21,	24,	30,	31,	33,	34
*ELEMENT, TYPE=U1013, ELSET=Upper
9,	39,	44,	47,	48,	53,	56,	57,	58,	59,	65,	66,	69,	70
*UEL PROPERTY, ELSET=Lower
10e6,	0.30000,	1.000000,	0, 0, 0, 0, 0
1,	13, 1
*UEL PROPERTY, ELSET=Upper
10e6,	0.30000,	1.000000,	0, 0, 0, 0, 0
1,	13, 1
*Element, type=C3D5, Elset = LowerSurf
14,	4,	11,	23,	10,	76
15,	1,	12,	23,	11,	76
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*Solid Section, elset=LowerSurf, material=Artificial
,
*Element, type=C3D5, Elset = UpperSurf
30,	51,	56,	52,	41,	80
31,	52,	56,	44,	38,	81
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*Solid Section, elset=UpperSurf, material=Artificial
,
*Element, type=C3D5, Elset = TopSurf
46,	60,	61,	65,	64,	80
47,	61,	62,	66,	65,	81
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*Solid Section, elset=TopSurf, material=Artificial
,
*Element, type=C3D5, Elset = BottomSurf
55,	30,	27,	26,	29,	76
56,	31,	28,	27,	30,	77
57,	33,	30,	29,	32,	78
58,	34,	31,	30,	33,	79
*Solid Section, elset=BottomSurf, material=Artificial
,
**
*Material, name=Artificial
*Elastic
1e-16, 0.3
**
*Surface, type=ELEMENT, name=LowerSurf
LowerSurf, S1
*Surface, type=ELEMENT, name=UpperSurf
UpperSurf, S1
*Surface, type=ELEMENT, name=TopSurf
TopSurf, S1
*Surface, type=ELEMENT, name=BottomSurf
BottomSurf, S1
*Surface Interaction, name=Contact
1.,
*Friction, lagrange
 0.5,
*Surface Behavior, direct
*Contact Pair, interaction=Contact, small sliding,type=SURFACE TO SURFACE
LowerSurf, UpperSurf
*Boundary
34, 1, 3
28, 2, 3
32, 3, 3
*STEP, NAME=Step-1
*Static
1, 1., 1e-05, 1
*Dsload
TopSurf, P, 1e6
*Dsload
BottomSurf, P, 1e6
*END STEP
