*Heading
ABAQUS input file for SBFEM UEL
*NODE, NSET=SBFEM_NODE
1,	0.0000000000,	0.7071067812,	0.7071067812
2,	0.1532634763,	0.6987525695,	0.6987525695
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*USER ELEMENT, NODES=8, TYPE=U1008, I PROPERTIES=3, PROPERTIES=8, COORDINATES=3, VARIABLES=1200
1, 2, 3
*ELEMENT, type=C3D8, ELSET=InnerA
1,	144,	145,	165,	148,	128,	129,	133,	132
2,	145,	146,	166,	165,	129,	130,	134,	133
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*ELEMENT, TYPE=C3D8, ELSET=OutterA
865,	1856,	1903,	1963,	1891,	1773,	1774,	1807,	1785
866,	1903,	1904,	1964,	1963,	1774,	1775,	1808,	1807
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*USER ELEMENT, NODES=10, TYPE=U1010, I PROPERTIES=3, PROPERTIES=8, COORDINATES=3, VARIABLES=1860
1, 2, 3
*ELEMENT, TYPE=U1010, ELSET=Outter
1010,	1647,	1648,	1680,	1681,	1707,	1725,	2043,	2044,	2085,	2086
1011,	1648,	1649,	1681,	1682,	1708,	1726,	2044,	2045,	2086,	2087
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*USER ELEMENT, NODES=13, TYPE=U1013, I PROPERTIES=3, PROPERTIES=8, COORDINATES=3, VARIABLES=3120
1, 2, 3
*ELEMENT, TYPE=U1013, ELSET=Inner
28,	8,	11,	12,	43,	67,	69,	90,	91,	116,	195,	206,	214,	242
29,	7,	40,	65,	67,	85,	86,	90,	116,	117,	214,	215,	242,	243
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*ELEMENT, TYPE=U1013, ELSET=Outter
1014,	1680,	1681,	1683,	1684,	1725,	1727,	1728,	1729,	1764,	2085,	2086,	2088,	2089
1015,	1681,	1682,	1684,	1685,	1726,	1728,	1730,	1731,	1762,	2086,	2087,	2089,	2090
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*UEL PROPERTY, ELSET=Inner
5000000.000000,	0.250000,	1.000000,	0, 0, 0, 0, 0
28,	3135, 1
*UEL PROPERTY, ELSET=Outter
1000000.000000,	0.250000,	1.000000,	0, 0, 0, 0, 0
28,	3135, 1
*Solid Section, elset=InnerA, material=InnerA
,
*Solid Section, elset=OutterA, material=OutterA
,
*Material, name=InnerA
*Elastic
 5e+06, 0.25
*Material, name=OutterA
*Elastic
 1e+06, 0.25
*Nset, nset=Bottom
3523,	3524,	3525,	3526,	3533,	3534
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*Element, type=C3D8, Elset = InnerSurf
3169,	43,	90,	67,	8,	206,	206,	206,	206
3170,	12,	11,	43,	8,	206,	206,	206,	206
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*Solid Section, elset=InnerSurf, material=Artificial
,
*Element, type=C3D8, Elset = OutterSurf
4033,	1646,	1658,	1680,	1647,	2043,	2043,	2043,	2043
4034,	1647,	1680,	1725,	1707,	2044,	2044,	2044,	2044
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*Solid Section, elset=OutterSurf, material=Artificial
,
*Element, type=C3D8, Elset = TopSurf
4897,	1837,	1850,	1915,	1867,	1855,	1855,	1855,	1855
4898,	1850,	1851,	1916,	1915,	1894,	1894,	1894,	1894
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*Solid Section, elset=TopSurf, material=Artificial
,
*Element, type=COH3D8, ELSET=Cohesive
4961,	1,	13,	35,	2,	1646,	1658,	1680,	1647
4962,	2,	35,	80,	62,	1647,	1680,	1725,	1707
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*Cohesive Section, elset=Cohesive, material=CohesiveM, response=TRACTION SEPARATION
,
*Material, name=CohesiveM
*Damage Initiation, criterion=MAXS
1000.,1000.,1000.
*Damage Evolution, type=DISPLACEMENT
0.01,
*Elastic, type=TRACTION, compression factor=1e-17
2e+07, 2e+07, 2e+07
*Material, name=Artificial
*Elastic
1e-08, 0.25
**
*Surface, type=ELEMENT, name=InnerSurf
InnerSurf, S1
*Surface, type=ELEMENT, name=OutterSurf
OutterSurf, S1
*Surface, type=ELEMENT, name=TopSurf
TopSurf, S1
*Surface Interaction, name=Contact
1.,
*Friction,lagrange
 0.2,
*Surface Behavior, pressure-overclosure=HARD
*Contact Pair, interaction=Contact, small sliding
OutterSurf, InnerSurf
*BOUNDARY
Bottom,	3,	3
4643, 1, 2
4295, 2, 2
*STEP, NAME=Step-1
*Static
1, 1., 1e-05, 1
*Dsload
TopSurf, P, -5000.
*END STEP
